Mon Jul  7 09:56:01 EDT 2025
$PROBLEM    Like 001,with xgxr2,advan2
$INPUT      NMROW ID TIME EVID CMT AMT DV MDV DOSE ROW
$DATA      NMsimData_xgxr014_testsim1.csv IGNORE=@
$SUBROUTINE ADVAN2 TRANS2
$PK
TVKA=THETA(1)
TVV=THETA(2)
TVCL=THETA(3)

KA=TVKA*EXP(ETA(1))
V=TVV*EXP(ETA(2))
CL=TVCL*EXP(ETA(3))

$ERROR
  IPRED=F
  IRES=DV-IPRED

  IF (IPRED.GT.1) THEN
    W = SQRT(IPRED**2*SIGMA(1,1)**2 + SIGMA(2,2)**2)
  ELSE
    W=1
  ENDIF

  IWRES=IRES/W
  Y=F+F*ERR(1)+ERR(2)

;-----------------------INITIAL ESTIMATES---------------------------------
$THETA  (0,0.127192) ; POPKA
$THETA  (0,0.042708) ; POPCL
$THETA  (0,0.625626) ; POPV2
$OMEGA  0.0782213
$OMEGA  0.0236941
$OMEGA  0.0440672
$SIGMA  0.199732
$SIGMA  0.000403546
$SIMULATION ONLYSIM (1027128956) SUBPROBLEMS=3
$TABLE      NMROW ROW TVKA TVV TVCL KA V CL PRED IPRED NOPRINT
            FILE=xgxr014_testsim1.tab

NM-TRAN MESSAGES
 WARNINGS AND ERRORS (IF ANY) FOR PROBLEM    1
 (WARNING  2) NM-TRAN INFERS THAT THE DATA ARE POPULATION.
 (WARNING  79) SIGMA IS USED ON THE RIGHT. WITH A SUBSEQUENT RUN, IF AN
 INITIAL ESTIMATE OF A DIAGONAL BLOCK OF SIGMA IS TO BE COMPUTED BY
 NONMEM, THAT BLOCK WILL BE SET TO AN IDENTITY MATRIX DURING THAT
 COMPUTATION. THIS COULD LEAD TO AN ARITHMETIC EXCEPTION.*
 * THE MAXIMUM NUMBER OF WARNINGS OF ONE OR MORE TYPES WAS REACHED.
 IT IS POSSIBLE THAT SOME WARNING MESSAGES WERE SUPPRESSED.

1NONLINEAR MIXED EFFECTS MODEL PROGRAM (NONMEM) VERSION 7.5.0
 ORIGINALLY DEVELOPED BY STUART BEAL, LEWIS SHEINER, AND ALISON BOECKMANN
 CURRENT DEVELOPERS ARE ROBERT BAUER, ICON DEVELOPMENT SOLUTIONS,
 AND ALISON BOECKMANN. IMPLEMENTATION, EFFICIENCY, AND STANDARDIZATION
 PERFORMED BY NOUS INFOSYSTEMS.
 PROBLEM NO.:         1
 Like 001,with xgxr2,advan2
 TOT. NO. OF OBS RECS:        0
 TOT. NO. OF INDIVIDUALS:        2
 ONE COMPARTMENT MODEL WITH FIRST-ORDER ABSORPTION (ADVAN2)
 PROBLEM NO.:           1      SUBPROBLEM NO.:           1
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 SIMULATION STEP PERFORMED
 Elapsed simulation  time in seconds:     0.00
 Elapsed finaloutput time in seconds:     0.00
 PROBLEM NO.:           1      SUBPROBLEM NO.:           2
 SIMULATION STEP PERFORMED
 Elapsed simulation  time in seconds:     0.00
 Elapsed finaloutput time in seconds:     0.00
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 #CPUT: Total CPU Time in Seconds,        0.029
